amdahl(n, p) := 1/((1 - p) + p/n)
vn := [1; 2; 3]
vp := [1; 1.8; 2.6]
amdahl_n(n, p) := d/dn(amdahl(n, p))
amdahl_p(n, p) := d/dp(amdahl(n, p))
F(n, p) := [amdahl(n, p); amdahl_p(n, p)]
p_0 := genfit(vn, vp, [.8], F) = 0.91879
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